*Heading
** Job name: SampleAnalysis Model name: Model-1
*Preprint, echo=NO, model=NO, history=NO, contact=NO
*Node, NSET=Nall
1, 0.0, 0.0
2, 5.0, 0.0
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*Element, TYPE=CPS4, ELSET=EALL
1, 1, 2, 43, 42
2, 2, 3, 44, 43
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*MATERIAL, NAME=Steel
*ELASTIC
42000.0, 0.2
*Step, name=LoadStep, nlgeom=NO
*Static
0.1, 1., 1e-5, 1.
*NSET, NSET=roller_support
1
*NSET, NSET=fixed_support
41
*BOUNDARY
roller_support, 1
fixed_support, 1
fixed_support, 2
*CLOAD
431, 2, -3
*End Step
