**
** Heading +++++++++++++++++++++++++++++++++++++++++++++++++
**
*Heading
Hash: SSxFU8e7, Date: 05/06/2025, Unit system: MM_TON_S_C
**
** Nodes +++++++++++++++++++++++++++++++++++++++++++++++++++
**
*Node, NSET=Nall
1, 0.00000000E+000, 0.00000000E+000, 0.00000000E+000
2, 0.00000000E+000, 0.00000000E+000, 1.30000000E+001
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**
** Elements ++++++++++++++++++++++++++++++++++++++++++++++++
**
*Element, Type=C3D8, Elset=Solid_part-36
1, 1, 79, 1530, 80, 89, 1533, 9007, 1534
2, 89, 1533, 9007, 1534, 7, 87, 1532, 86
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**
** Node sets +++++++++++++++++++++++++++++++++++++++++++++++
**
*Nset, Nset=Internal_Selection-1_Displacement_Rotation-1
21, 22, 23, 24, 29, 30
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*Nset, Nset=Internal_Selection-1_Displacement_Rotation-2
13, 14, 15, 16, 27, 28
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*Nset, Nset=Internal_Selection-1_Concentrated_Force-1
49, 64, 1357
*Nset, Nset=Internal_Selection-1_Concentrated_Force-2
64, 65, 1359
*Nset, Nset=Internal_Selection-1_Concentrated_Force-3
64, 67, 1364
*Nset, Nset=Internal_Selection-1_Concentrated_Force-4
1, 2, 79
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*Nset, Nset=Internal_Selection-1_Displacement_Rotation-3
1, 3, 5, 7, 9, 11
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**
** Element sets ++++++++++++++++++++++++++++++++++++++++++++
**
*Elset, Elset=Black
1, 2, 3, 4, 5, 6
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*Elset, Elset=Internal_Selection-1_Solid_Section-1
Solid_part-36,
Solid_part-37,
Solid_part-38,
Solid_part-39,
Solid_part-40,
Solid_part-41,
Solid_part-42,
Solid_part-43,
Solid_part-44,
Solid_part-45,
Solid_part-46,
Solid_part-47,
Solid_part-48,
Solid_part-49,
Solid_part-50,
Solid_part-51,
Solid_part-52,
Solid_part-53,
Solid_part-54,
Solid_part-55,
Solid_part-56,
Solid_part-57,
Solid_part-58,
Solid_part-59,
Solid_part-60,
Solid_part-61,
Solid_part-62,
Solid_part-63,
Solid_part-64,
Solid_part-65,
Solid_part-66,
Solid_part-67,
Solid_part-68,
Solid_part-69
**
** Surfaces ++++++++++++++++++++++++++++++++++++++++++++++++
**
**
** Physical constants ++++++++++++++++++++++++++++++++++++++
**
**
** Materials +++++++++++++++++++++++++++++++++++++++++++++++
**
*Material, Name=GeoPolymer-1
*Elastic
20000, 0.2
**
** Sections ++++++++++++++++++++++++++++++++++++++++++++++++
**
*Solid section, Elset=Internal_Selection-1_Solid_Section-1, Material=GeoPolymer-1
**
** Pre-tension sections ++++++++++++++++++++++++++++++++++++
**
**
** Constraints +++++++++++++++++++++++++++++++++++++++++++++
**
**
** Surface interactions ++++++++++++++++++++++++++++++++++++
**
**
** Contact pairs +++++++++++++++++++++++++++++++++++++++++++
**
**
** Amplitudes ++++++++++++++++++++++++++++++++++++++++++++++
**
**
** Initial conditions ++++++++++++++++++++++++++++++++++++++
**
**
** Steps +++++++++++++++++++++++++++++++++++++++++++++++++++
**
**
** Step-1 ++++++++++++++++++++++++++++++++++++++++++++++++++
**
*Step
*Static
**
** Output frequency ++++++++++++++++++++++++++++++++++++++++
**
*Output, Frequency=1
**
** Boundary conditions +++++++++++++++++++++++++++++++++++++
**
*Boundary, op=New
** Name: Displacement_Rotation-1
*Boundary
Internal_Selection-1_Displacement_Rotation-1, 2, 2, 0
Internal_Selection-1_Displacement_Rotation-1, 4, 4, 0
Internal_Selection-1_Displacement_Rotation-1, 6, 6, 0
** Name: Displacement_Rotation-2
*Boundary
Internal_Selection-1_Displacement_Rotation-2, 1, 1, 0
Internal_Selection-1_Displacement_Rotation-2, 5, 5, 0
Internal_Selection-1_Displacement_Rotation-2, 6, 6, 0
** Name: Displacement_Rotation-3
*Boundary, Fixed
Internal_Selection-1_Displacement_Rotation-3, 3, 3
**
** Loads +++++++++++++++++++++++++++++++++++++++++++++++++++
**
*Cload, op=New
*Dload, op=New
** Name: Pretension-1
*Cload
49, 1, 117
64, 1, 117
1357, 1, 117
49, 2, 117
64, 2, 117
1357, 2, 117
** Name: Pretension-2
*Cload
64, 2, 117
65, 2, 117
1359, 2, 117
64, 3, -117
65, 3, -117
1359, 3, -117
** Name: Pretension-3
*Cload
64, 1, 117
67, 1, 117
1364, 1, 117
64, 3, -117
67, 3, -117
1364, 3, -117
** Name: Pretension-4
*Cload
1, 1, 117
2, 1, 117
79, 1, 117
1, 2, 117
2, 2, 117
79, 2, 117
** Name: Pretension-5
*Cload
1, 1, 117
7, 1, 117
89, 1, 117
1, 3, 117
7, 3, 117
89, 3, 117
** Name: Pretension-6
*Cload
1, 2, 117
3, 2, 117
80, 2, 117
1, 3, 117
3, 3, 117
80, 3, 117
** Name: TopLoad-1
*Cload
64, 3, -7.81
65, 3, -7.81
66, 3, -7.81
67, 3, -7.81
68, 3, -7.81
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8956, 3, -7.81
**
** Defined fields ++++++++++++++++++++++++++++++++++++++++++
**
**
** History outputs +++++++++++++++++++++++++++++++++++++++++
**
**
** Field outputs +++++++++++++++++++++++++++++++++++++++++++
**
*Node file
RF, U
*El file
S, E, NOE
**
** End step ++++++++++++++++++++++++++++++++++++++++++++++++
**
*End step
