*Heading
Model: Model-1,     Date: 04/29/2025
*Part, name=Part-1
*End Part
*Assembly, name=Assembly
*Instance, name=Part-1-1, part=Part-1
         0.0,          0.0,           0.
*Node
2, 0, 0, 0
3, 5, 0, 0
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*ELEMENT, TYPE=S4
2, 2, 3, 44, 43
3, 3, 4, 45, 44
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*Nset, nset=roller_support
2
*Nset, nset=fixed_support
42
*Nset, nset=Internal_Selection-1_Concentrated_Force-1
2
*Nset, nset=Internal_Selection-1_Displacement_Rotation-1
42
*Nset, nset=Internal_Selection-1_YSymm
2, 43, 84, 125, 166, 207, 248, 289, 330, 371, 412
*Elset, elset=EALL
2, 3, 4, 5, 6, 7
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
*Elset, elset=Internal_Selection-1_Solid_Section-1
2
*Solid section, elset=Internal_Selection-1_Solid_Section-1, material=Steel
CaeGlobals.EquationContainer
*End Instance
*End Assembly
*Material, name=Steel
*Elastic
CaeGlobals.EquationContainer, CaeGlobals.EquationContainer
*Step
*Static
1, 1
*Boundary
PART-1-1.Internal_Selection-1_Displacement_Rotation-1, 2, 2, Infinity
*Boundary
PART-1-1.Internal_Selection-1_YSymm, 1, 1, Infinity
*Cload
PART-1-1.Internal_Selection-1_Concentrated_Force-1, 1, CaeGlobals.EquationContainer
*Node file
RF, U
*El file
S, E
*End step
