**
** Heading +++++++++++++++++++++++++++++++++++++++++++++++++
**
*Heading
Hash: ir3KUErs, Date: 04/30/2025, Unit system: MM_TON_S_C
**
** Nodes +++++++++++++++++++++++++++++++++++++++++++++++++++
**
*Node
1, 8.74439316E+001, 0.00000000E+000, 0.00000000E+000
2, 8.74439316E+001, 0.00000000E+000, 3.00000000E+001
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**
** Elements ++++++++++++++++++++++++++++++++++++++++++++++++
**
*Element, Type=C3D4, Elset=Compound-1
1, 397, 389, 614, 412
2, 287, 653, 654, 322
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**
** Node sets +++++++++++++++++++++++++++++++++++++++++++++++
**
*Nset, Nset=Internal_Selection-1_Concentrated_Force-1
9, 10, 43, 44, 45, 46
*Nset, Nset=Internal_Selection-1_Displacement_Rotation-1
13, 14, 15, 16, 86, 87
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*Nset, Nset=Internal-1_Internal_Selection-1_Uniform_Pressure-1
1, 2, 7, 8, 17, 18, 36, 37, 41, 42, 148, 149, 559, 560, 561, 562
*Nset, Nset=Internal_Selection-1_Concentrated_Force-2
9, 10, 11, 12, 43, 44
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**
** Element sets ++++++++++++++++++++++++++++++++++++++++++++
**
*Elset, Elset=Black
171, 504, 509, 519, 526, 531
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*Elset, Elset=Internal_Selection-1_Solid_Section-1
Compound-1
*Elset, Elset=Internal-1_Internal_Selection-1_Uniform_Pressure-1_S3
526, 1297, 1685
*Elset, Elset=Internal-1_Internal_Selection-1_Uniform_Pressure-1_S2
531, 593, 790, 1475
*Elset, Elset=Internal-1_Internal_Selection-1_Uniform_Pressure-1_S1
548, 1664
*Elset, Elset=Internal-1_Internal_Selection-1_Uniform_Pressure-1_S4
1237, 1247, 1461, 1599, 1798, 1801, 2042, 2064, 2344
**
** Surfaces ++++++++++++++++++++++++++++++++++++++++++++++++
**
*Surface, Name=Internal_Selection-1_Uniform_Pressure-1, Type=Element
Internal-1_Internal_Selection-1_Uniform_Pressure-1_S3, S3
Internal-1_Internal_Selection-1_Uniform_Pressure-1_S2, S2
Internal-1_Internal_Selection-1_Uniform_Pressure-1_S1, S1
Internal-1_Internal_Selection-1_Uniform_Pressure-1_S4, S4
**
** Physical constants ++++++++++++++++++++++++++++++++++++++
**
**
** Materials +++++++++++++++++++++++++++++++++++++++++++++++
**
*Material, Name=Material-1
*Elastic
210000, 0.3
**
** Sections ++++++++++++++++++++++++++++++++++++++++++++++++
**
*Solid section, Elset=Internal_Selection-1_Solid_Section-1, Material=Material-1
**
** Pre-tension sections ++++++++++++++++++++++++++++++++++++
**
**
** Constraints +++++++++++++++++++++++++++++++++++++++++++++
**
**
** Surface interactions ++++++++++++++++++++++++++++++++++++
**
**
** Contact pairs +++++++++++++++++++++++++++++++++++++++++++
**
**
** Amplitudes ++++++++++++++++++++++++++++++++++++++++++++++
**
**
** Initial conditions ++++++++++++++++++++++++++++++++++++++
**
**
** Steps +++++++++++++++++++++++++++++++++++++++++++++++++++
**
**
** Step-1 ++++++++++++++++++++++++++++++++++++++++++++++++++
**
*Step
*Static
**
** Output frequency ++++++++++++++++++++++++++++++++++++++++
**
*Output, Frequency=1
**
** Boundary conditions +++++++++++++++++++++++++++++++++++++
**
*Boundary, op=New
** Name: Displacement_Rotation-1
*Boundary, Fixed
Internal_Selection-1_Displacement_Rotation-1, 1, 1
Internal_Selection-1_Displacement_Rotation-1, 2, 2
Internal_Selection-1_Displacement_Rotation-1, 3, 3
**
** Loads +++++++++++++++++++++++++++++++++++++++++++++++++++
**
*Cload, op=New
*Dload, op=New
** Name: Concentrated_Force-1
*Cload
Internal_Selection-1_Concentrated_Force-1, 2, -100
** Name: Uniform_Pressure-1
*Dload
Internal-1_Internal_Selection-1_Uniform_Pressure-1_S3, P3, 1
Internal-1_Internal_Selection-1_Uniform_Pressure-1_S2, P2, 1
Internal-1_Internal_Selection-1_Uniform_Pressure-1_S1, P1, 1
Internal-1_Internal_Selection-1_Uniform_Pressure-1_S4, P4, 1
** Name: Concentrated_Force-2
*Cload
Internal_Selection-1_Concentrated_Force-2, 1, 110
**
** Defined fields ++++++++++++++++++++++++++++++++++++++++++
**
**
** History outputs +++++++++++++++++++++++++++++++++++++++++
**
**
** Field outputs +++++++++++++++++++++++++++++++++++++++++++
**
*Node file
RF, U
*El file
S, E, NOE
**
** End step ++++++++++++++++++++++++++++++++++++++++++++++++
**
*End step
